n ≡ 25
a ≡ 0
b ≡ 4
k ≡ 15
j ≡ 0 .. k
X ≡ runif(n, a, b)
11111111111111111111111111111111111111111111111111111111111111111
Δ ≡ |b - a|/k = 0.266667
inf[j] ≡ (a + Δ*(j + 0.5))
transpose(X) = [0.00507368, 0.773292, 2.34002, 1.40123, 3.29135, 0.696516, 2.84198, 1.21594, 0.365645, 0.589254, 3.95403, 0.476319, 0.0356907, 2.12666, 2.40706, 0.664998, 1.80314, 0.228224, 3.13328, 2.0795, 3.50387, 3.8236, 2.15737, 1.8483, 3.44888]
M ≡ hist(k, X)
P ≡ M/n
h ≡ P/Δ
fx_th ≡ dunif(X, a, b)
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M_t ≡ (a + b)/2 = 2
m ≡ sum(X)/n = 1.80845
D_t ≡ (b - a)^2/12 = 1.33333
D ≡ sum((X - m)^2)/(n - 1) = 1.60659
σ ≡ D^(1/2) = 1.26751
σ_t ≡ sqrt(D_t) = 1.1547
λ ≡ sum(X^2)/n = 4.81281
λ_t ≡ (a^2 + a*b + b^2)/3 = 5.33333
k ≡ 15
j ≡ 1 .. k
Fx[j - 1] ≡ sum(P[i], i = 0 .. j - 1)
Fx_th[j - 1] ≡ sum(fx_th[i]*Δ, i = 0 .. j - 1)
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3333333333333333333333333333333333333333333333333333333333333333333333333333333333333333333333333333333333333333333333333333333333333333
n ≡ 25
a ≡ 0
p ≡ 0.3
k ≡ 15
X ≡ rgeom(n, p)
j ≡ (0 .. max(X))
Max ≡ max(X) = 13
transpose(X) = [0, 0, 1, 3, 0, 2, 1, 13, 3, 1, 0, 2, 0, 2, 0, 1, 0, 1, 5, 2, 1, 0, 4, 1, 1]
M ≡ hist(max(X) + 1, X)
P ≡ M/n
gh ≡ P
ginf[j] ≡ a + j
gfx_th[j] ≡ dgeom(j, p)
M_t ≡ (1 - p)/p = 2.33333
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m ≡ sum(X)/n = 1.76
D_t ≡ (1 - p)/p^2 = 7.77778
D ≡ sum((X - m)^2)/(n - 1) = 7.27333
σ ≡ D^(1/2) = 2.69691
σ_t ≡ sqrt(D_t) = 2.78887
λ_t ≡ D_t + M_t^2 = 13.2222
λ ≡ sum(X^2)/n = 10.08
gFx[j] ≡ sum(gh[i], i = 0 .. j)
gFx_th[j] ≡ pgeom(j, p)
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222222222222222222222222222222222222222222222222222222222222222222222222222222222222222222222222222222222222222222222222222222222222222222
n ≡ 25
k ≡ 15
a ≡ 0
b ≡ 4
j ≡ 0 .. 800
m_sr[j] ≡
    for i ∈ 0 .. 800
        X ← runif(n, a, b)
        m_sr[i] ← sum(X)/n
Min ≡ min(m_sr) = 1.24214
Max ≡ max(m_sr) = 2.76747
Δ ≡ |Max - Min|/k = 0.101689
j ≡ 0 .. k
inf[j] ≡ (Min + Δ*j + 0.5*Δ)
fx_th ≡ dnorm(inf, (a + b)/2, sqrt((b - a)^2/12/n))
M ≡ hist(k, m_sr)
P ≡ M/800
h ≡ P/Δ
j ≡ 1 .. k
Fx[j - 1] ≡ sum(h[i]*Δ, i = 0 .. j - 1)
maxmin ≡ Max - Min = 1.52533
Fx_th[j - 1] ≡ sum(fx_th[i]*Δ, i = 0 .. j)
hM ≡ max(h) = 1.67177
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n ≡ 25
k ≡ 15
d_sr[j] ≡
    for i ∈ 0 .. 800
        X ← runif(n, a, b)
        d_sr[i] ← sum((X - sum(X)/n)^2)/(n - 1)
Min ≡ min(d_sr) = 0.678724
Max ≡ max(d_sr) = 2.12665
Δ ≡ |Max - Min|/k = 0.0965285
j ≡ 0 .. k
inf[j] ≡ (Min + Δ*j + 0.5*Δ)
fx_th ≡ dnorm(inf, (b - a)^2/12, sqrt((b - a)^2/12/n))
hM ≡ max(h) = 1.67177
M ≡ hist(k, d_sr)
P ≡ M/800
h ≡ P/Δ
j ≡ 1 .. k
Fx[j - 1] ≡ sum(h[i]*Δ, i = 0 .. j - 1)
maxmin ≡ Max - Min = 1.44793
Fx_th[j - 1] ≡ sum(fx_th[i]*Δ, i = 0 .. j)
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444444444444444444444444444444444444444444444444444444444444444444444444444444444444444444444444444444444444444444444444444444444444444444444
k ≡ 15
n ≡ 25
p ≡ 0.3
j ≡ 0 .. 800
m_sr[j] ≡
    for i ∈ 0 .. 800
        X ← rgeom(n, p)
        m_sr[i] ← sum(X)/n
m ≡ (1 - p)/p = 2.33333
Min ≡ min(m_sr) = 0.96
Max ≡ max(m_sr) = 4.36
Δ ≡ |Max - Min|/k = 0.226667
j ≡ 0 .. k
inf[j] ≡ (Min + Δ*j + 0.5*Δ)
maxmin ≡ Max - Min = 3.4
fx_th ≡ dnorm(inf, (1 - p)/p, sqrt((1 - p)/p^2/n))
M ≡ hist(k, m_sr)
P ≡ M/800
h ≡ P/Δ
hM ≡ max(h) = 0.810662
j ≡ 1 .. k
Fx[j - 1] ≡ sum(h[i]*Δ, i = 0 .. j - 1)
Fx_th[j - 1] ≡ sum(fx_th[i]*Δ, i = 0 .. j)
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n ≡ 25
p ≡ 0.3
k ≡ 15
d_sr[j] ≡
    for i ∈ 0 .. 800
        X ← rgeom(n, p)
        d_sr[i] ← sum((X - sum(X)/n)^2)/(n - 1)
j ≡ 0 .. k
Min ≡ min(d_sr) = 0.86
D_t ≡ (1 - p)/p^2 = 7.77778
Max ≡ max(d_sr) = 30.8567
Δ ≡ |Max - Min|/k = 1.99978
maxmin ≡ Max - Min = 29.9967
inf[j] ≡ (Min + Δ*j + 0.5*Δ)
M ≡ hist(k, d_sr)
fx_th ≡ dnorm(inf, (1 - p)/p^2, sqrt(Var(d_sr)))
P ≡ M/800
h ≡ P/Δ
hM ≡ max(h) = 0.114388
j ≡ 1 .. k
Fx[j - 1] ≡ sum(h[i]*Δ, i = 0 .. j - 1)
Fx_th[j - 1] ≡ sum(fx_th[i]*Δ, i = 0 .. j)
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55555555555555555555555555555555555555555555555555555555555555555555555555555555555555555555555555555555555555555555555555555555555555555555555555555555555555555
k ≡ 15
n ≡ 25
p ≡ 0.3
j ≡ 0 .. 800
m_sr[j] ≡
    for i ∈ 0 .. 800
        X ← rgeom(n, p)
        m_sr[i] ← sum(X)/n
m ≡ (1 - p)/p = 2.33333
Min ≡ min(m_sr) = 0.68
Max ≡ max(m_sr) = 4.36
Δ ≡ |Max - Min|/k = 0.245333
j ≡ 0 .. k
inf[j] ≡ (Min + Δ*j)
maxmin ≡ Max - Min = 3.68
M ≡ hist(k + 1, m_sr)
fx_th ≡ dnorm(inf, (1 - p)/p, sqrt((1 - p)/p^2/n))
P ≡ M/801
h ≡ P/Δ
hM ≡ max(h) = 0.778578
Fx[j] := sum(P[i], i = 0 .. j)
Fx_th[j] := sum(fx_th[i]*Δ, i = 0 .. j)
transpose(Fx) = [0.00124844, 0.00499376, 0.0324594, 0.082397, 0.158552, 0.329588, 0.520599, 0.679151, 0.789014, 0.882647, 0.930087, 0.970037, 0.98377, 0.991261, 0.996255, 1]
transpose(inf) = [0.68, 0.925333, 1.17067, 1.416, 1.66133, 1.90667, 2.152, 2.39733, 2.64267, 2.888, 3.13333, 3.37867, 3.624, 3.86933, 4.11467, 4.36]
(1 - p)/p = 2.33333
sqrt((1 - p)/p^2/n) = 0.557773
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σ := sqrt(Var(m_sr)) = 0.549472
n = 25
m := mean(m_sr) = 2.32959
Δп := (1.1*m - 0.9*m)/2 = 0.232959
0.9*m = 2.09663
1.1*m = 2.56255
inf[0] := 0.9*m + Δ
inf[15] := 1.1*m
inf := sort(inf)
aaa := lookup(0.9*m + Δ, inf, Fx) = [0.520599]
bbb := lookup(1.1*m, inf, Fx) = [0.789014]
B := bbb - aaa = [0.268414]
(1 + B)/2 = [0.634207]
l_t := qnorm((1 + B)/2, 0, 1) = [0.343017]
Δт := l_t*σ = [0.188478]
ощ := ((Δт - Δп)/Δт)*100 = -23.5997
n ≡ 25
a ≡ 0
b ≡ 4
k ≡ 15
j ≡ 0 .. k
X ≡ runif(n, a, b)
66666666666666666666666666666666666666666666666666666
Δ ≡ |b - a|/k = 0.266667
inf[j] ≡ (a + Δ*j)
transpose(X) = [0.868802, 3.12681, 1.47986, 3.89028, 3.26309, 3.92577, 3.48228, 1.28037, 0.644065, 3.25358, 3.08895, 0.710349, 2.80796, 1.4329, 0.610855, 1.63715, 2.77199, 0.777388, 3.27593, 2.76615, 3.79079, 0.731864, 1.49377, 0.441656, 0.871043]
M ≡ hist(k + 1, X)
P ≡ M/n
h ≡ P/Δ
fx_th ≡ dunif(X, a, b)
Fx[j] ≡ sum(P[i], i = 0 .. j)
Fx_th[j] := (inf[j] - a)/(b - a)
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Max := Fx_th - Fx
Max2 := Fx - Fx_th
transpose(Fx_th) = [0, 0.0666667, 0.133333, 0.2, 0.266667, 0.333333, 0.4, 0.466667, 0.533333, 0.6, 0.666667, 0.733333, 0.8, 0.866667, 0.933333, 1]
transpose(Fx) = [0.12, 0.32, 0.32, 0.36, 0.48, 0.52, 0.52, 0.52, 0.52, 0.52, 0.64, 0.64, 0.8, 0.88, 0.88, 1]
transpose(Max2) = [0.12, 0.253333, 0.186667, 0.16, 0.213333, 0.186667, 0.12, 0.0533333, -0.0133333, -0.08, -0.0266667, -0.0933333, 0, 0.0133333, -0.0533333, 0]
Δ :=
    max(Max) if max(Max) > max(Max2)
    max(Max2) otherwise
    = 0.253333
λ := Δ*sqrt(n) = 1.26667
а := 0.1019
λ[кр] := 1.22  # error: Эта переменная не определена.
n ≡ 25
a ≡ 0
b ≡ 4
k ≡ 15
j ≡ 0 .. k
X ≡ runif(n, 0, 1)
777777777777777777777777777777777777777777777777777777777777777777777777777777777777777777777
Δ ≡ |b - a|/(k + 1) = 0.25
inf[j] ≡ (a + Δ*(j + 1))
transpose(X) = [0.878241, 0.905497, 0.384563, 0.196841, 0.562585, 0.307871, 0.712612, 0.149602, 0.906609, 0.218051, 0.246001, 0.165477, 0.254432, 0.584704, 0.186542, 0.0376561, 0.533821, 0.859031, 0.509215, 0.766936, 0.791264, 0.811165, 0.309617, 0.690712, 0.352264]
X ≡ a + (b - a)*X
transpose(X) = [3.51296, 3.62199, 1.53825, 0.787365, 2.25034, 1.23148, 2.85045, 0.598406, 3.62643, 0.872205, 0.984006, 0.66191, 1.01773, 2.33882, 0.746168, 0.150624, 2.13529, 3.43613, 2.03686, 3.06774, 3.16506, 3.24466, 1.23847, 2.76285, 1.40906]
M ≡ hist(k + 1, X)
fx_th ≡ dunif(X, a, b)*Δ
P ≡ M/n
h ≡ P/Δ
Fx[j] ≡ sum(P[i], i = 0 .. j)
Fx_th[j] := (inf[j] - a)/(b - a)
M_t ≡ (a + b)/2 = 2
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m ≡ sum(X)/n = 1.97141
transpose(inf) = [0.25, 0.5, 0.75, 1, 1.25, 1.5, 1.75, 2, 2.25, 2.5, 2.75, 3, 3.25, 3.5, 3.75, 4]
D_t ≡ (b - a)^2/12 = 1.33333
D ≡ sum((X - m)^2)/(n - 1) = 1.26566
transpose(M) = [1, 0, 4, 3, 1, 2, 1, 0, 1, 2, 1, 0, 2, 2, 1, 4]
xi ≡
    for i ∈ 0 .. k
        xi ← xi + (fx_th[i] - P[i])^2/fx_th[i]
    = 0.6128
transpose(P) = [0.04, 0, 0.16, 0.12, 0.04, 0.08, 0.04, 0, 0.04, 0.08, 0.04, 0, 0.08, 0.08, 0.04, 0.16]
transpose(fx_th) = [0.0625, 0.0625, 0.0625, 0.0625, 0.0625, 0.0625, 0.0625, 0.0625, 0.0625, 0.0625, 0.0625, 0.0625, 0.0625, 0.0625, 0.0625, 0.0625, 0.0625, 0.0625, 0.0625, 0.0625, 0.0625, 0.0625, 0.0625, 0.0625, 0.0625]
xi := xi*n = 15.32
transpose(Fx) = [0.04, 0.04, 0.2, 0.32, 0.36, 0.44, 0.48, 0.48, 0.52, 0.6, 0.64, 0.64, 0.72, 0.8, 0.84, 1]
1 - pchisq(xi, k) = 0.428622
transpose(Fx_th) = [0.0625, 0.125, 0.1875, 0.25, 0.3125, 0.375, 0.4375, 0.5, 0.5625, 0.625, 0.6875, 0.75, 0.8125, 0.875, 0.9375, 1]
n ≡ 25
t ≡ 12
777777777777777777777777777777777777777777777777777777777777777777777777777777777777777777777
X ≡
    for i ∈ 1 .. t
        T ← T + runif(n, 0, 1)
X ≡ sqrt(12)/sqrt(t)*(X - t/2)
a ≡ min(X) = -2.25671
b ≡ max(X) = 1.30895
k ≡ 15
j ≡ 0 .. k
Δ ≡ |b - a|/(k + 1) = 0.222853
inf1[j] ≡ (a + Δ*(j + 1))
transpose(X) = [-0.419666, -0.355556, -0.0105089, -1.56135, -0.627887, 0.959661, -0.523376, 0.110321, -0.0584, 0.243304, 0.389094, 0.999907, -1.02111, 0.298312, -0.701468, -1.65532, 0.464365, -0.457274, 1.30895, 0.17676, -1.4715, -2.25671, -0.333129, -0.193437, -0.189205]
fx_th ≡ dnorm(inf1, 0, 1)*Δ
M ≡ hist(k + 1, X)
P ≡ M/n
h ≡ P/Δ
Fx_th := pnorm(inf1, 0, 1)
Fx[j] ≡ sum(P[i], i = 0 .. j)
m ≡ sum(X)/n = -0.275409
mt := 0
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transpose(inf1) = [-2.03385, -1.811, -1.58815, -1.36529, -1.14244, -0.919585, -0.696732, -0.473879, -0.251025, -0.0281719, 0.194681, 0.417535, 0.640388, 0.863241, 1.08609, 1.30895]
Dt := 1
D ≡ sum((X - m)^2)/(n - 1) = 0.734777
transpose(M) = [1, 0, 1, 2, 0, 1, 1, 2, 4, 3, 3, 3, 1, 0, 2, 1]
transpose(P) = [0.04, 0, 0.04, 0.08, 0, 0.04, 0.04, 0.08, 0.16, 0.12, 0.12, 0.12, 0.04, 0, 0.08, 0.04]
xi ≡ transpose((fx_th - P)^2)/transpose(fx_th)
transpose(fx_th) = [0.011238, 0.0172484, 0.0251906, 0.0350076, 0.0462931, 0.0582507, 0.0697458, 0.0794633, 0.0861482, 0.0888704, 0.0872367, 0.0814841, 0.0724232, 0.0612511, 0.0492926, 0.0377469]
xi1 ≡ n*sum(xi) = 10.5462
transpose(Fx) = [0.04, 0.04, 0.08, 0.16, 0.16, 0.2, 0.24, 0.32, 0.48, 0.6, 0.72, 0.84, 0.88, 0.88, 0.96, 1]
1 - pchisq(xi1, k) = 0.784048
transpose(Fx_th) = [0.0209833, 0.0350705, 0.0561267, 0.0860806, 0.126636, 0.178895, 0.242985, 0.317793, 0.400897, 0.488763, 0.577179, 0.661856, 0.73904, 0.805998, 0.861281, 0.904724]
transpose(сдвинутый_на_1_inf) = [-2.25671, -2.03385, -1.811, -1.58815, -1.36529, -1.14244, -0.919585, -0.696732, -0.473879, -0.251025, -0.0281719, 0.194681, 0.417535, 0.640388, 0.863241, 1.08609]
сдвинутый_на_1_inf[0] ≡
    for i ∈ 1 .. k
        сдвинутый_на_1_inf[i] ← inf1[i - 1]
сдвинутый_на_1_inf[0] ≡ inf1[0] - Δ  # убовляем дельта от начала
fx_th[j] ≡ pnorm(inf1[j], 0, 1) - pnorm(сдвинутый_на_1_inf[j], 0, 1)  # щитаем разность функций вероятности
xi ≡ transpose((fx_th - P)^2)/transpose(fx_th)
transpose(fx_th) = [0.00897001, 0.0140873, 0.0210562, 0.0299539, 0.0405552, 0.0522589, 0.0640905, 0.074808, 0.0831041, 0.0878652, 0.0884163, 0.0846775, 0.0771835, 0.0669578, 0.0552838, 0.0434426]
transpose(P) = [0.04, 0, 0.04, 0.08, 0, 0.04, 0.04, 0.08, 0.16, 0.12, 0.12, 0.12, 0.04, 0, 0.08, 0.04]
transpose(fx_th - P) = [-0.03103, 0.0140873, -0.0189438, -0.0500461, 0.0405552, 0.0122589, 0.0240905, -0.00519204, -0.0768959, -0.0321348, -0.0315837, -0.0353225, 0.0371835, 0.0669578, -0.0247162, 0.00344257]
transpose((fx_th - P)^2)/transpose(fx_th) = [0.107342, 0.0140873, 0.0170433, 0.0836155, 0.0405552, 0.00287569, 0.00905521, 0.000360353, 0.0711516, 0.0117526, 0.0112822, 0.0147345, 0.0179133, 0.0669578, 0.01105, 0.000272803]
xi1 ≡ n*sum(xi) = 12.0012
1 - pchisq(xi1, k) = 0.678935
